// COMSOL Multiphysics 6.3.0.335 model "Bhatt-HW5-COMSOL-2.mph"
// Lead Vectors and Fields
// Outline of the model tree

Parameters
  torso = 10[cm]  // torso radius
  p = 0.03[mA]  // dipole moment
  d = 4[mm]  // dipole seperation
  theta = 0[deg]  // dipole angle
  d_x = 0[cm]  // dipole-center, x
  d_y = 0[cm]  // dipole-center, y
  r = 0.2[mm]  // dipole pole radius
  aRA = 150[deg]  // RA polar angle
  aLA = 30[deg]  // LA polar angle
  aLL = 270[deg]  // LL polar angle
  aREF = 225[deg]  // Ref polar angle
  width = 1[cm]  // electrode width
  height = 2[mm]  // electrode height
  x1 = 8.66[cm]
  y1 = 5[cm]
  I0 = p/d

Couplings
  aveop1: Average "Average RA" on domains 1
  aveop2: Average "Average LA" on domains 5
  aveop3: Average "Average LL" on domains 4
  aveop4: Average "Average Dipole_1" on domains 6
  aveop5: Average "Average Dipole_2" on domains 7

Geometry
  geom1 "Geometry 1" (2D, length unit m)
    c1: Circle "Torso" | r = torso
    r1: Rectangle "RA" | size = {width, height}; base = center; pos = {-8.66[cm], 5[cm]}; rot = 60
    r2: Rectangle "LA" | size = {width, height}; base = center; pos = {8.66[cm], 5[cm]}; rot = -60
    r3: Rectangle "LL" | size = {width, height}; base = center; pos = {0, -0.1}
    r4: Rectangle "REF" | size = {width, height}; base = center; pos = {-0.0707, -0.0707}; rot = -45
    c2: Circle "dipole +" | r = r; pos = {d/2*cos(theta) + d_x, d/2*sin(theta) + d_y}
    c3: Circle "dipole -" | r = r; pos = {-d/2*cos(theta) + d_x, -d/2*sin(theta) + d_y}
    pt1: Point "D_Pos" (disabled) | p = {d/2*cos(theta), d/2*sin(theta)}; pid = 1
    pt2: Point "D_Neg" (disabled) | p = {-d/2*cos(theta), -d/2*sin(theta)}; pid = 2
    pt3: Point (disabled)
    pt4: Point (disabled) | p = {, 5[cm]}
    pt5: Point (disabled) | p = {, -5[cm]}
    fin: Finalize "Form Union"
    ige1: IgnoreEdges | input = fin(1) boundaries 3, 4, 6, 9, 10, 12, 15, 16, 18-20, 23

Materials
  mat4: Common "Lung" (disabled) on domains 2
    def: def "Basic"
      heatcapacity = 2967
      density = rho(T)
      thermalconductivity = k(T)
      electricconductivity = 0.02
      relpermittivity = 250
      pw1: Piecewise | funcname = k; arg = T; extrap = interior; pieces = {276.15, 318.15, 0.407*(1+1.18e-3*(T-310.15))}; argunit = K; fununit = W/(m*K)
      pw2: Piecewise | funcname = rho; arg = T; extrap = interior; pieces = {276.15, 318.15, (0.407*(1+1.18e-3*(T-310.15)))/(2967*1.307e-7*(1+2.37e-3*(T-310.15)))}; argunit = K; fununit = kg/m^3
  mat2: Common "Steel AISI 4340" on domains 1, 3-7
    def: def "Basic"
      relpermeability = 1
      electricconductivity = 4.032e6[S/m]
      thermalexpansioncoefficient = 12.3e-6[1/K]
      heatcapacity = 475[J/(kg*K)]
      relpermittivity = 1
      density = 7850[kg/m^3]
      thermalconductivity = 44.5[W/(m*K)]
    Enu: Enu "Young's modulus and Poisson's ratio"
      E = 205[GPa]
      nu = 0.28
  mat3: Common "Muscle" (disabled) on no domains
    def: def "Basic"
      heatcapacity = 3421[J/(kg*K)]
      density = 1090[kg/m^3]
      thermalconductivity = 0.49[W/(m*K)]
      electricconductivity = 0.1
      relpermittivity = 66
  mat5: Common "Bone" on domains 2
    def: def "Basic"
      heatcapacity = 1313[J/(kg*K)]
      density = 1908[kg/m^3]
      thermalconductivity = 0.32[W/(m*K)]
      electricconductivity = 0.02
      relpermittivity = 250

Physics
  ec: ConductiveMedia "Electric Currents" on all domains
    dependent variable V
    cucn1: CurrentConservation (default)
    ein1: ElectricInsulation (default)
    init1: init "Initial Values 1" (default)
    lcs1: LineCurrentSource "Pos" on points 12 | Qjl = p/d
    gnd1: Ground "Ref_Ground" on boundaries 4-6
    lcs2: LineCurrentSource "Neg" on points 21 | Qjl = -p/d
    ncd1: NormalCurrentDensity "LA" (disabled) on boundaries 11 | nJ = (p/d)/width
    ncd2: NormalCurrentDensity "RA" (disabled) on boundaries 2 | nJ = -(p/d)/width

Mesh
  mesh1 "Mesh 1" (physics-controlled)
    size: MeshSizeDefault | hauto = 2

Studies
  std1 "Study 1"
    param: Parametric "Parametric Sweep" | pname = theta; plistarr = 0 -90; punit = deg
    stat: Stationary

Solver configurations
  sol1 "Solution 1" (study std1)
    v1: Variables "Dependent Variables 1"
    s1: Stationary "Stationary Solver 1"
      dDef: Direct
      fc1: FullyCoupled
  sol2 "Parametric Solutions 1" (study std1)

Datasets
  dset1: Solution | solution = sol1
  dset2: Solution | solution = sol2

Derived values
  gev1: EvalGlobal "Global Evaluation 1"
    data = dset2
    table = tbl1
    expr = {aveop1(V), aveop2(V), aveop3(V), aveop2(V) - aveop1(V), aveop3(V) - aveop1(V), aveop3(V) - aveop2(V), aveop4(V) - aveop5(V)}
    unit = {mV, mV, mV, mV, mV, mV, V}
    descr = {RA, LA, LL, VI, VII, VIII, V2}
  gev2: EvalGlobal "Global Evaluations - Lead Vectors"
    data = dset2
    table = tbl2
    expr = {(aveop2(V) - aveop1(V))/p, (aveop3(V) - aveop1(V))/p, (aveop3(V) - aveop2(V))/p, (aveop1(V) - 0.5*(aveop2(V) + aveop3(V)))/p, (aveop2(V) - 0.5*(aveop3(V) + aveop1(V)))/p, (aveop3(V) - 0.5*(aveop2(V) + aveop1(V)))/p}
    unit = {Ω, Ω, Ω, Ω, Ω, Ω}
    descr = {LI, LII, LIII, VaR, VaL, VaF}
  pev1: EvalPoint "Point Evaluation 1"
    data = dset2
    table = tbl3
    expr = {ec.Ex, ec.Ey}
    unit = {mV/m, mV/m}
    descr = {"Electric field, x-component", "Electric field, y-component"}

Tables
  tbl1: Table
    // Global Evaluation 1
    theta (deg) | RA (mV) | LA (mV) | LL (mV) | VI (mV) | VII (mV) | VIII (mV) | V2 (mV)
    0 | -111.708 | -11.1227 | 89.4385 | 100.586 | 201.147 | 100.561 | 0.820113
  tbl2: Table
    // Global Evaluations - Lead Vectors
    theta (deg) | LI (Ω) | LII (Ω) | LIII (Ω) | VaR (Ω) | VaL (Ω) | VaF (Ω)
    0 | 273.841 | 136.692 | -137.149 | -205.266 | 205.495 | -0.228363
    -90 | -0.10637 | 236.978 | 237.085 | -118.436 | -118.596 | 237.032
  tbl3: Table
    // Point Evaluation 1
    Electric field, x-component (mV/m), Point: 13 | Electric field, x-component (mV/m), Point: 14 | Electric field, x-component (mV/m), Point: 15 | Electric field, y-component (mV/m), Point: 13 | Electric field, y-component (mV/m), Point: 14 | Electric field, y-component (mV/m), Point: 15
    -235.601 | -412.797 | -551.132 | -0.409744 | -0.151154 | -0.00902931

Plots
  pg1: PlotGroup2D "Electric Signals" | data = dset1
    surf1: Surface "Phi" | expr = V; unit = mV
    str1: Streamline "J" on boundaries 2-11, 13-19, 24, 29-32
      expr = {ec.Ex, ec.Ey}
      udist = 0.04
      pointtype = arrow
      arrowlength = logarithmic
      arrowscale = 0.0032
      maxsteps = 5000
      col1: Color "Color Expression 1" | expr = V
      filt1: Filter | expr = !isScalingSystemDomain
  pg2: PlotGroup2D "Electric Field (ec)" | data = dset1
    surf1: Surface | expr = ec.normE
    str1: Streamline on boundaries 2-11, 13-19, 24, 29-32 | expr = {ec.Ex, ec.Ey}; udist = 0.02; maxsteps = 5000
      col1: Color "Color Expression 1" | expr = ec.normE
      filt1: Filter | expr = !isScalingSystemDomain
  pg3: PlotGroup2D "Parameter Sweep_1" | data = dset2
    surf1: Surface | expr = V; unit = mV
    str1: Streamline on boundaries 2-11, 13-19, 24, 29-32
      expr = {ec.Ex, ec.Ey}
      udist = 0.04
      pointtype = arrow
      arrowlength = logarithmic
      arrowscale = 0.012
      maxsteps = 5000
      col1: Color "Color Expression 1" | expr = V
      filt1: Filter | expr = !isScalingSystemDomain
    arws1: ArrowSurface (disabled) | expr = {ec.Ex, ec.Ey}
  pg4: PlotGroup2D "Electric Field (ec) 1" | data = dset2
    surf1: Surface | expr = ec.normE
    str1: Streamline on boundaries 2-11, 13-19, 24, 29-32 | expr = {ec.Ex, ec.Ey}; udist = 0.02; maxsteps = 5000
      col1: Color "Color Expression 1" | expr = ec.normE
      filt1: Filter | expr = !isScalingSystemDomain
  pg5: PlotGroup1D "1D Plot Group 1" | data = dset1